<?xml version="1.0" ?>
<Node name="root" dt="0.05" showBoundingTree="0" gravity="0 0 0">
    <VisualStyle displayFlags="showBehaviorModels hideCollisionModels hideForceFields" />
    <RequiredPlugin pluginName='SofaOpenglVisual'/>
    <RequiredPlugin pluginName='SofaMiscCollision'/>
	<RequiredPlugin pluginName='SofaBoundaryCondition'/> <!-- Needed to use components [FixedConstraint, ]-->
	<RequiredPlugin pluginName='SofaEngine'/> <!-- Needed to use components [BoxROI, ]-->
	<RequiredPlugin pluginName='SofaGeneralSimpleFem'/> <!-- Needed to use components [TetrahedralCorotationalFEMForceField, ]-->
	<RequiredPlugin pluginName='SofaImplicitOdeSolver'/> <!-- Needed to use components [EulerImplicitSolver, ]-->
	<RequiredPlugin pluginName='SofaLoader'/> <!-- Needed to use components [MeshObjLoader, ]-->
	<RequiredPlugin pluginName='SofaMeshCollision'/> <!-- Needed to use components [TriangleCollisionModel, ]-->
	<RequiredPlugin pluginName='SofaTopologyMapping'/> <!-- Needed to use components [Hexa2TetraTopologicalMapping, ]-->


    <DefaultPipeline name="default21" verbose="0" depth="1"/>
    <BruteForceBroadPhase/>
    <BVHNarrowPhase/>
    <DefaultContactManager name="default22" response="default" />
    <DefaultCollisionGroupManager name="default23" />
    <MinProximityIntersection name="Proximity" alarmDistance="0.5" contactDistance="0.04" />

    <EulerImplicitSolver name="cg_odesolver" printLog="false"  rayleighStiffness="0.1" rayleighMass="0.1" />
    <CGLinearSolver iterations="20" name="linear solver" tolerance="1.0e-4" threshold="1.0e-4" />

    <MeshObjLoader name="loader" filename="./mesh/colon_collision.obj" scale3d="1 1 1"/>
    <SparseGridTopology name="grid" n="20 12 24" position="@loader.position" />

    <Node name="Colon">
        <MechanicalObject src="@../grid" name="dofs" />
        <TetrahedronSetTopologyContainer name="Container" />
        <TetrahedronSetTopologyModifier name="Modifier" />
        <TetrahedronSetGeometryAlgorithms name="GeomAlgo" template="Vec3d" />
        <Hexa2TetraTopologicalMapping name="default28" input="@../grid" output="@Container" />


        <BoxROI name="FixedROI_1" box="-1 7 2  -7 8.5 5" drawBoxes="0" position="@dofs.rest_position"/>
        <FixedConstraint name="ROI1" indices="@FixedROI_1.indices" />

        <BoxROI name="FixedROI_2" box="-1 8 -4  -7 9.2 2" drawBoxes="1" position="@dofs.rest_position"/>
        <FixedConstraint name="ROI2" indices="@FixedROI_2.indices" />

        <BoxROI name="FixedROI_3" box="-1 11 -4  -7 12 0.5" drawBoxes="0" position="@dofs.rest_position"/>
        <FixedConstraint name="ROI3" indices="@FixedROI_3.indices" />

        <BoxROI name="FixedROI_4" box="-4.5 11 -1  -7 12 2" drawBoxes="0" position="@dofs.rest_position"/>
        <FixedConstraint name="ROI4" indices="@FixedROI_4.indices" />

        <DiagonalMass totalMass="0.1" />
        <TetrahedralCorotationalFEMForceField name="FEM" youngModulus="100" poissonRatio="0.3" method="large" />
        <!--<MiddleForceField name="center" force="0.015" pace="20.0" />-->

        <Node name="Colon_Collision">
            <MechanicalObject name="collision" src="@../../loader" />
            <TriangleSetTopologyContainer  name="TriContainer" src="@../../loader" />
			<TriangleSetTopologyModifier   name="TriModifier" />
			<TriangleSetGeometryAlgorithms name="GeomAlgo" template="Vec3d" />

            <TriangleCollisionModel group="1" contactStiffness="10"/>

            <BarycentricMapping input="@.." output="@collision" />
        </Node>

        <Node name="Colon_Visu">
            <MeshObjLoader name="meshVisu" filename="./mesh/colon_visu.obj" handleSeams="1" scale3d="1 1 1"/>
            <OglModel name="Visual" src="@meshVisu" />
            <BarycentricMapping input="@.." output="@Visual" />
        </Node>

        <Node name="Polyp1_Visu">
            <MeshObjLoader name="mesh_polyp1" filename="./mesh/polyp_1.obj" handleSeams="1" scale3d="1 1 1"/>
            <OglModel name="Visu_polyp1" src="@mesh_polyp1" />
            <BarycentricMapping input="@.." output="@Visu_polyp1" />
        </Node>

	</Node>

    <Node name="Capsule">
        <!--<MechanicalObject name="capsulePos" position="-3.8 11.2 1.2  -3.8 11.2 1.1" velocity="0 -1 0  0 -1 0"/>-->

        <MechanicalObject name="capsulePos" position="-4 8.5 3.2 " />
        <UniformMass totalMass="10.0" />

        <SphereCollisionModel radius="0.1" contactStiffness="1"/>
    </Node>
</Node>
