<?xml version="1.0" ?>
<Node name="lroot" gravity="0 -1000 0" dt="0.02">
    <RequiredPlugin name="Sofa.Component.AnimationLoop"/> <!-- Needed to use components [FreeMotionAnimationLoop] -->
    <RequiredPlugin name="Sofa.Component.Collision.Detection.Algorithm"/> <!-- Needed to use components [BVHNarrowPhase,BruteForceBroadPhase,CollisionPipeline] -->
    <RequiredPlugin name="Sofa.Component.Collision.Detection.Intersection"/> <!-- Needed to use components [MinProximityIntersection] -->
    <RequiredPlugin name="Sofa.Component.Collision.Geometry"/> <!-- Needed to use components [LineCollisionModel,PointCollisionModel,TriangleCollisionModel] -->
    <RequiredPlugin name="Sofa.Component.Collision.Response.Contact"/> <!-- Needed to use components [CollisionResponse] -->
    <RequiredPlugin name="Sofa.Component.Constraint.Lagrangian.Correction"/> <!-- Needed to use components [UncoupledConstraintCorrection] -->
    <RequiredPlugin name="Sofa.Component.Constraint.Lagrangian.Solver"/> <!-- Needed to use components [LCPConstraintSolver] -->
    <RequiredPlugin name="Sofa.Component.IO.Mesh"/> <!-- Needed to use components [MeshOBJLoader] -->
    <RequiredPlugin name="Sofa.Component.LinearSolver.Iterative"/> <!-- Needed to use components [CGLinearSolver] -->
    <RequiredPlugin name="Sofa.Component.Mapping.Linear"/> <!-- Needed to use components [BarycentricMapping] -->
    <RequiredPlugin name="Sofa.Component.Mass"/> <!-- Needed to use components [UniformMass] -->
    <RequiredPlugin name="Sofa.Component.ODESolver.Backward"/> <!-- Needed to use components [EulerImplicitSolver] -->
    <RequiredPlugin name="Sofa.Component.SolidMechanics.FEM.Elastic"/> <!-- Needed to use components [HexahedronFEMForceField] -->
    <RequiredPlugin name="Sofa.Component.StateContainer"/> <!-- Needed to use components [MechanicalObject] -->
    <RequiredPlugin name="Sofa.Component.Topology.Container.Constant"/> <!-- Needed to use components [MeshTopology] -->
    <RequiredPlugin name="Sofa.Component.Topology.Container.Grid"/> <!-- Needed to use components [SparseGridRamificationTopology] -->
    <RequiredPlugin name="Sofa.GL.Component.Rendering3D"/> <!-- Needed to use components [OglModel] -->
    <RequiredPlugin name="VirtualXRay"/> <!-- Needed to use components [CircularTrajectoryEngine,SurfaceXRayRenderer,XRayModel] -->

    <LCPConstraintSolver tolerance="1e-3" maxIt="1000" initial_guess="false" build_lcp="false"  printLog="0" mu="0.2"/>
    <FreeMotionAnimationLoop />
    <CollisionPipeline depth="15" verbose="0" draw="0" />
    <BruteForceBroadPhase/>
    <BVHNarrowPhase/>
    <MinProximityIntersection name="Proximity" alarmDistance="1.5" contactDistance="1" />

    <CollisionResponse name="Response" response="FrictionContactConstraint" />
    <Node name="Snake" >
        <SparseGridRamificationTopology name="grid" n="4 12 3" fileTopology="mesh/snake_body.obj" nbVirtualFinerLevels="3" finestConnectivity="0"/>

        <EulerImplicitSolver name="cg_odesolver" rayleighMass="1" rayleighStiffness="0.03" />
        <CGLinearSolver name="linear solver" iterations="20" tolerance="1e-12" threshold="1e-18" />
        <MechanicalObject name="dofs"  dy="2" position="@grid.position"/>
        <UniformMass totalMass="1.0" />
        <HexahedronFEMForceField name="FEM" youngModulus="30000.0" poissonRatio="0.3" method="large"
        updateStiffnessMatrix="false" printLog="0" topology="@grid"/>

        <UncoupledConstraintCorrection defaultCompliance="184" useOdeSolverIntegrationFactors="0"/>

        <Node name="Collis">
            <MeshOBJLoader name="loader" filename="mesh/meca_snake_900tri.obj" />
            <MeshTopology src="@loader" name="colliTopo"/>
            <MechanicalObject src="@loader" name="CollisModel" />
            <TriangleCollisionModel  name="colTri" selfCollision="0" />
            <LineCollisionModel name="colLine" selfCollision="0" />
            <PointCollisionModel name="colPoint" selfCollision="0" />
            <BarycentricMapping input="@.." output="@." />
        </Node>

        <Node name="VisuBody" tags="Visual" >
            <MeshOBJLoader name="loader" filename="mesh/snake_body.obj" handleSeams="1"/>
            <OglModel  name="VisualBody" src="@loader" />
            <BarycentricMapping input="@.." output="@VisualBody" />
        </Node>

        <Node name="VisuCornea" tags="Visual" >
            <MeshOBJLoader name="loader" filename="mesh/snake_cornea.obj" handleSeams="1"/>
            <OglModel  name="VisualCornea" src="@loader"   />
            <BarycentricMapping input="@.." output="@VisualCornea" />
        </Node>

        <Node name="VisuEye" tags="Visual" >
            <MeshOBJLoader name="loader" filename="mesh/snake_yellowEye.obj" handleSeams="1"/>
            <OglModel  name="VisualEye" src="@loader"/>
            <BarycentricMapping input="@.." output="@VisualEye" />
        </Node>

        <Node name="XrayBody" >
            <MeshOBJLoader name="loader" filename="mesh/snake_body.obj" handleSeams="0"/>
            <XRayModel src="@loader" density="1200.0" isInner="0"/>
            <BarycentricMapping input="@.." />
        </Node>

        <Node name="XRayCornea"  >
            <MeshOBJLoader name="loader" filename="mesh/snake_cornea.obj" handleSeams="0"/>
            <XRayModel src="@loader" density="1500.0" isInner="1"/>
            <BarycentricMapping input="@.." />
        </Node>

        <Node name="XRayEye" >
            <MeshOBJLoader name="loader" filename="mesh/snake_yellowEye.obj" handleSeams="0"/>
            <XRayModel src="@loader" density="1500.0" isInner="1"/>
            <BarycentricMapping input="@.." />
        </Node>
    </Node>

    <Node name="Base" >
        <Node name="Stick">
            <MeshOBJLoader name="loader" filename="mesh/collision_batons.obj" />
            <MeshTopology src="@loader" />
            <MechanicalObject src="@loader" name="CollisModel" />
            <LineCollisionModel simulated="false" moving="false" />
            <PointCollisionModel simulated="false"  moving="false"/>
        </Node>
        <Node name="Blobs">
            <MeshOBJLoader name="loader" filename="mesh/collision_boules_V3.obj" />
            <MeshTopology src="@loader" />
            <MechanicalObject src="@loader" name="CollisModel" />
            <TriangleCollisionModel simulated="false" moving="false"/>
            <LineCollisionModel simulated="false" moving="false"/>
            <PointCollisionModel simulated="false" moving="false"/>
        </Node>
            <Node name="Foot">
            <MeshOBJLoader name="loader" filename="mesh/collision_pied.obj" />
            <MeshTopology src="@loader" />
            <MechanicalObject src="@loader" name="CollisModel" />
            <TriangleCollisionModel simulated="false" moving="false"/>
            <LineCollisionModel simulated="false" moving="false"/>
            <PointCollisionModel simulated="false" moving="false"/>
        </Node>

        <Node name="Visu" tags="Visual" >
            <MeshOBJLoader name="loader" filename="mesh/SOFA_pod.obj" handleSeams="1"/>
            <OglModel  name="OglModel" src="@loader" />
        </Node>
        <Node name="XRay" >
            <MeshOBJLoader name="loader" filename="mesh/SOFA_pod.obj" handleSeams="0"/>
            <XRayModel src="@loader" density="2000.0" isInner="1"/>
        </Node>
    </Node>


    <Node name="XRay">
        <SurfaceXRayRenderer name="XRenderer"
            sourcePosition="0 30 -100"
            detectorPosition="0 30 100" detectorSize="150 150" detectorUpVector="0 1 0" detectorResolution="512 512"
            drawSource="false" draw="true" normalizeColors="1"  drawBeam="true"
            xrayFrameRate="1"
        />

    </Node>

</Node>
