<?xml version="1.0"?>
<Node name="root" dt="0.02"  gravity="0 0 0">
    <RequiredPlugin name="Sofa.Component.AnimationLoop"/> <!-- Needed to use components [FreeMotionAnimationLoop] -->
    <RequiredPlugin name="Sofa.Component.Collision.Detection.Algorithm"/> <!-- Needed to use components [BVHNarrowPhase, BruteForceBroadPhase, DefaultPipeline] -->
    <RequiredPlugin name="Sofa.Component.Collision.Detection.Intersection"/> <!-- Needed to use components [LocalMinDistance] -->
    <RequiredPlugin name="Sofa.Component.Collision.Geometry"/> <!-- Needed to use components [LineCollisionModel, PointCollisionModel, TriangleCollisionModel] -->
    <RequiredPlugin name="Sofa.Component.Collision.Response.Contact"/> <!-- Needed to use components [DefaultContactManager] -->
    <RequiredPlugin name="Sofa.Component.Constraint.Lagrangian.Correction"/> <!-- Needed to use components [LinearSolverConstraintCorrection] -->
    <RequiredPlugin name="Sofa.Component.Constraint.Lagrangian.Solver"/> <!-- Needed to use components [LCPConstraintSolver] -->
    <RequiredPlugin name="Sofa.Component.Constraint.Projective"/> <!-- Needed to use components [FixedConstraint] -->
    <RequiredPlugin name="Sofa.Component.IO.Mesh"/> <!-- Needed to use components [MeshOBJLoader] -->
    <RequiredPlugin name="Sofa.Component.LinearSolver.Direct"/> <!-- Needed to use components [BTDLinearSolver] -->
    <RequiredPlugin name="Sofa.Component.ODESolver.Backward"/> <!-- Needed to use components [EulerImplicitSolver] -->
    <RequiredPlugin name="Sofa.Component.SceneUtility"/> <!-- Needed to use components [InfoComponent] -->
    <RequiredPlugin name="Sofa.Component.SolidMechanics.Spring"/> <!-- Needed to use components [RestShapeSpringsForceField] -->
    <RequiredPlugin name="Sofa.Component.StateContainer"/> <!-- Needed to use components [MechanicalObject] -->
    <RequiredPlugin name="Sofa.Component.Topology.Container.Constant"/> <!-- Needed to use components [MeshTopology] -->
    <RequiredPlugin name="Sofa.Component.Topology.Container.Dynamic"/> <!-- Needed to use components [EdgeSetGeometryAlgorithms, EdgeSetTopologyContainer, EdgeSetTopologyModifier] -->
    <RequiredPlugin name="Sofa.Component.Topology.Container.Grid"/> <!-- Needed to use components [RegularGridTopology] -->
    <RequiredPlugin name="Sofa.Component.Visual"/> <!-- Needed to use components [VisualStyle] -->
    <RequiredPlugin name="BeamAdapter" />

    <VisualStyle displayFlags="showVisualModels showBehaviorModels showCollisionModels hideMappings hideForceFields" />
    <FreeMotionAnimationLoop />
    <LCPConstraintSolver mu="0.1" tolerance="1e-6" maxIt="1000" build_lcp="false" />

    <CollisionPipeline depth="6" verbose="1" />
    <BruteForceBroadPhase/>
    <BVHNarrowPhase/>
    <LocalMinDistance name="localmindistance" alarmDistance="1.0" contactDistance="0.25" angleCone="0.02"/>
    <CollisionResponse name="Response" response="FrictionContactConstraint" />

    <Node name="NavigationSceneNode">
        <!-- Shape of the catheter -->
        <Node name="topoLines_cath">
            <RodStraightSection name="StraightSection" youngModulus="1000" radius="0.01" massDensity="0.0000155" nbEdgesCollis="200" nbEdgesVisu="300" length="240.0"/>
            <RodSpireSection name="SpireSection" youngModulus="1000" radius="0.01" massDensity="0.0000155" nbEdgesCollis="10" nbEdgesVisu="20" length="2.0" spireDiameter="10" spireHeight="0.0"/>
            <WireRestShape template="Rigid3d" name="catheterRestShape" wireMaterials="@StraightSection @SpireSection"/>

            <EdgeSetTopologyContainer name="meshLinesCath"/>
            <EdgeSetTopologyModifier name="Modifier"/>
            <EdgeSetGeometryAlgorithms name="GeomAlgo" template="Rigid3d" />
            <MechanicalObject name="dofTopo1" template="Rigid3d" />
        </Node>


        <!-- Interactive catheter and physics on it -->
        <Node name="InstrumentCombined">
            <EulerImplicitSolver printLog="false"/>
            <BTDLinearSolver/>
            <RegularGridTopology name="meshLinesCombined" nx="250" ny="1" nz="1"
                xmax="0.0" xmin="0.0" ymax="0" ymin="0" zmax="0" zmin="0"/>
            <MechanicalObject name="DOFs" template="Rigid3d" translation="3 1.0 -4"  rotation="60 70 0" />
            <WireBeamInterpolation WireRestShape="@../topoLines_cath/catheterRestShape" name="InterpolCatheter"  />
            <AdaptiveBeamForceFieldAndMass interpolation="@InterpolCatheter" name="CatheterForceField" />
            <InterventionalRadiologyController listening="true" controlledInstrument="0" instruments="InterpolCatheter" name="DeployController"
                speed="0.0" startingPos="3 1.0 -4   0.4689105 0.5470623 0 0.6934305" step="0.1" template="Rigid3d"  xtip="0.1"  />

            <LinearSolverConstraintCorrection wire_optimization="true"/>
            <FixedProjectiveConstraint name="FixStart1" indices="0" />
            <RestShapeSpringsForceField name="RestSPForceField" points="@DeployController.indexFirstNode" angularStiffness="1e8" stiffness="1e8"/>

            <!-- COLLISION -->
            <Node name="Collision">
                <EdgeSetTopologyContainer name="collisEdgeSet"  />
                <EdgeSetTopologyModifier name="colliseEdgeModifier"/>
                <MechanicalObject name="CollisionDOFs"  />
                <MultiAdaptiveBeamMapping ircontroller="../DeployController" name="collisMap" useCurvAbs="1"/>
                <PointCollisionModel group="1" name="PointBeamModel" proximity="0.0"/>
                <LineCollisionModel group="1" proximity="0.0" />
            </Node>

            <!-- VISUALIZATION -->
<!--
            <Node name="VisuCatheter">
                <MechanicalObject name="QuadsCatheter"/>
                <QuadSetTopologyContainer name="ContainerCath" />
                <QuadSetTopologyModifier name="Modifier"/>
                <QuadSetGeometryAlgorithms name="GeomAlgo" template="Vec3d"/>
                <Edge2QuadTopologicalMapping flipNormals="true" input="@../../topoLines_cath/meshLinesCath" nbPointsOnEachCircle="10" output="@ContainerCath" radius="0.1" tags="catheter" />
                <AdaptiveBeamMapping input="@../DOFs" interpolation="@../InterpolCatheter" isMechanical="false" name="VisuMapCath" output="@QuadsCatheter" printLog="1" useCurvAbs="1"/>

                <Node name="VisuOgl">

                    <OglModel quads="@../ContainerCath.quads" color="0 0.85 0.9" material="texture Ambient 1 0.2 0.2 0.2 0.0 Diffuse 1 1.0 1.0 1.0 1.0 Specular 1 1.0 1.0 1.0 1.0 Emissive 0 0.15 0.05 0.05 0.0 Shininess 1 20" name="VisualCatheter" />
                    <IdentityMapping input="@../QuadsCatheter" output="@VisualCatheter" name="VisuCathIM"/>
                </Node>
            </Node>
            -->
        </Node>
    </Node>


    <!-- Collision model of the vessels -->
    <Node name="Ureter">
        <MeshOBJLoader name="meshLoader" filename="mesh/Urinary_system/Urinary_left.obj" triangulate="true" flipNormals="1"/>
        <MeshTopology position="@meshLoader.position"  triangles="@meshLoader.triangles"/>
        <MechanicalObject name="mecaUreter" position="0 0 0" showObject="1"/>
        <TriangleCollisionModel simulated="0" moving="0"/>
        <LineCollisionModel simulated="0" moving="0"/>
        <PointCollisionModel simulated="0" moving="0"/>

        <!--<Node name="UreterVisu">
            <OglModel name="OglUreter"  color="1 0 0 0.3"  />
            <IdentityMapping input="@../mecaUreter" output="@OglUreter"/>
        </Node>
-->
    </Node>

</Node>
