<?xml version="1.0" ?>
<Node name="root" dt="0.05" showBoundingTree="0" gravity="0 0 0">
	<RequiredPlugin name="SofaOpenglVisual"/>
    <RequiredPlugin name="Geomagic plugin" pluginName="Geomagic" />
    <RequiredPlugin name='SofaHaptics'/>

    <DefaultPipeline name="pipeline" depth="6" verbose="0"/>
    <BruteForceBroadPhase/>
    <BVHNarrowPhase/>
    <DefaultContactManager name="response" response="FrictionContact" />
    <LocalMinDistance name="proximity" alarmDistance="0.15" contactDistance="0.05" angleCone="0.0" />
    <FreeMotionAnimationLoop/>
    <LCPConstraintSolver tolerance="0.001" maxIt="1000"/>

	<GeomagicDriver name="GeomagicDevice" deviceName="Default Device" scale="1"
    drawDeviceFrame="0" positionBase="0 0 0" orientationBase="0 0.707 0 -0.707" manualStart="true" />

	<Node name="Cubestatic">
		<MeshObjLoader name="loaderC2" filename="./mesh/cube0.obj" translation="-2 -6.5 -2" scale="4 4 4" />
        <MechanicalObject name="Cube"  position="@loaderC2.position" />
		<MeshTopology name="grid" src="@loaderC2" />
		<TriangleCollisionModel simulated="0" moving="0" bothSide="false"/>
		<LineCollisionModel simulated="0" moving="0" />
		<PointCollisionModel simulated="0" moving="0" />
		<Node name="CubeVisu">
			<OglModel name="CubeVisualModel"/>
			<IdentityMapping input="@../" output="@CubeVisualModel" />
		</Node>
    </Node>

	<Node name="Floor">
        <MeshObjLoader name="loaderF" filename="./mesh/plane.obj" translation="0 -2 0" scale="2 2 2"/>
        <MeshTopology src="@loaderF" />
        <MechanicalObject src="@loaderF" />
        <TriangleCollisionModel simulated="0" moving="0" bothSide="false" group="1"/>
        <LineCollisionModel simulated="0" moving="0" group="1" />
        <PointCollisionModel simulated="0" moving="0" group="1"/>
		<Node name="VisuFloor" >
            <OglModel name="FloorVisualModel"/>
            <IdentityMapping input="@../" output="@FloorVisualModel" />
        </Node>
    </Node>


    <!-- ADDED: the Mechanical state Controller gathers events from the Tool driver and populates the Mechanical state -->
    <Node name="Tool">
        <MechanicalObject template="Rigid3" name="DOFs" position="@GeomagicDevice.positionDevice"/>
        <MechanicalStateController template="Rigid3" listening="true" mainDirection="-1.0 0.0 0.0" handleEventTriggersUpdate="true"/>
    </Node>

	<Node name="Instrument" >
        <EulerImplicitSolver name="ODE solver" rayleighStiffness="0.05" rayleighMass="1.0" />
        <CGLinearSolver name="linear solver" iterations="25" tolerance="1e-10" threshold="10e-10" />

		<MechanicalObject name="instrumentState" template="Rigid3" tags="GeomagicDevice" position="@../GeomagicDevice.positionBase"/>
		<UniformMass name="mass" totalMass="0.05" />

		<RestShapeSpringsForceField stiffness='1000000' angularStiffness='1000000' external_rest_shape='@../Tool/DOFs' points='0' external_points='0'/>
        <LCPForceFeedback activate="true" forceCoef="0.1"/> <!-- ADDED : Compute a force-feedback for the device -->
        <UncoupledConstraintCorrection useOdeSolverIntegrationFactors="0"/>
<!--
		<Node name="VisuTool" >
            <MeshObjLoader name="meshLoader_1" filename="./mesh/dental_instrument.obj" handleSeams="1" />
            <OglModel name="InstrumentVisualModel" src="@meshLoader_1" color="1.0 0.2 0.2 1.0" />
            <RigidMapping name="MM->VM mapping" input="@instrumentState" output="@InstrumentVisualModel" />
        </Node>
	-->
        <Node name="CollisionModel" >
            <MeshObjLoader filename="./mesh/dental_instrument_centerline.obj"  name="loader"/>
            <MeshTopology src="@loader" name="InstrumentCollisionModel" />
            <MechanicalObject src="@loader" name="instrumentCollisionState" />
            <LineCollisionModel contactStiffness="100"/>
            <PointCollisionModel contactStiffness="100"/>
			<SphereCollisionModel radius="0.02" contactStiffness="100"/>
            <RigidMapping name="MM->CM mapping" input="@instrumentState" output="@instrumentCollisionState" />
        </Node>
    </Node>

</Node>
