<?xml version="1.0" ?>
<Node name="root" dt="0.02">
    <RequiredPlugin name="Sofa.Component.Collision.Detection.Algorithm"/> <!-- Needed to use components [BVHNarrowPhase, BruteForceBroadPhase, DefaultPipeline] -->
    <RequiredPlugin name="Sofa.Component.Collision.Detection.Intersection"/> <!-- Needed to use components [MinProximityIntersection] -->
    <RequiredPlugin name="Sofa.Component.Collision.Geometry"/> <!-- Needed to use components [LineCollisionModel, PointCollisionModel, TriangleCollisionModel] -->
    <RequiredPlugin name="Sofa.Component.Collision.Response.Contact"/> <!-- Needed to use components [DefaultContactManager] -->
    <RequiredPlugin name="Sofa.Component.IO.Mesh"/> <!-- Needed to use components [MeshGmshLoader, MeshOBJLoader] -->
    <RequiredPlugin name="Sofa.Component.LinearSolver.Iterative"/> <!-- Needed to use components [CGLinearSolver] -->
    <RequiredPlugin name="Sofa.Component.Mapping.Linear"/> <!-- Needed to use components [IdentityMapping] -->
    <RequiredPlugin name="Sofa.Component.Mass"/> <!-- Needed to use components [DiagonalMass] -->
    <RequiredPlugin name="Sofa.Component.MechanicalLoad"/> <!-- Needed to use components [PlaneForceField] -->
    <RequiredPlugin name="Sofa.Component.ODESolver.Backward"/> <!-- Needed to use components [EulerImplicitSolver] -->
    <RequiredPlugin name="Sofa.Component.SolidMechanics.FEM.Elastic"/> <!-- Needed to use components [TetrahedralCorotationalFEMForceField] -->
    <RequiredPlugin name="Sofa.Component.SolidMechanics.Spring"/> <!-- Needed to use components [TriangularBendingSprings] -->
    <RequiredPlugin name="Sofa.Component.StateContainer"/> <!-- Needed to use components [MechanicalObject] -->
    <RequiredPlugin name="Sofa.Component.Topology.Container.Constant"/> <!-- Needed to use components [MeshTopology] -->
    <RequiredPlugin name="Sofa.Component.Topology.Container.Dynamic"/> <!-- Needed to use components [TetrahedronSetGeometryAlgorithms, TetrahedronSetTopologyContainer, TetrahedronSetTopologyModifier, TriangleSetGeometryAlgorithms, TriangleSetTopologyContainer, TriangleSetTopologyModifier] -->
    <RequiredPlugin name="Sofa.Component.Topology.Mapping"/> <!-- Needed to use components [Tetra2TriangleTopologicalMapping] -->
    <RequiredPlugin name="Sofa.GL.Component.Rendering3D"/> <!-- Needed to use components [OglModel] -->

    <DefaultAnimationLoop />
    <DefaultVisualManagerLoop />

    <DefaultPipeline verbose="0" depth="10" draw="0" />
    <BruteForceBroadPhase/>
    <BVHNarrowPhase/>
    <MinProximityIntersection name="Proximity" alarmDistance="0.5" contactDistance="0.1" />
    <DefaultContactManager name="Response" response="PenalityContactForceField" />

    <Node name="Cylinder">
        <EulerImplicitSolver name="cg_odesolver" printLog="false" />
        <CGLinearSolver iterations="25" name="linear solver" tolerance="1.0e-9" threshold="1.0e-9" />
		<MeshGmshLoader name="loader" filename="./mesh/cylinder.msh" translation="0 6 0"/>
        <MechanicalObject src="@loader" name="Volume"/>

		<TetrahedronSetTopologyContainer  name="TetraContainer" position="@Volume.position" src="@loader"/>
		<TetrahedronSetTopologyModifier   name="Modifier" />
		<TetrahedronSetGeometryAlgorithms name="GeomAlgo"  template="Vec3d" />

		<DiagonalMass massDensity="1.0" topology="@TetraContainer"/>
		<TetrahedralCorotationalFEMForceField name="FEM" youngModulus="1600" poissonRatio="0.3" method="large" topology="@TetraContainer"/>
        <PlaneForceField normal="0 1 0" d="-1" stiffness="100000" showPlane="1" showPlaneSize="20"/>
        <Node name="Surface">
            <TriangleSetTopologyContainer  name="TriContainer" />
			<TriangleSetTopologyModifier   name="Modifier" />
			<TriangleSetGeometryAlgorithms name="GeomAlgo"   template="Vec3d" />

            <Tetra2TriangleTopologicalMapping input="@../TetraContainer" output="@TriContainer" />
			<TriangularBendingSprings name="FEM-Bend" stiffness="400" damping="1.0" topology="@TriContainer"/>
			<TriangleCollisionModel contactFriction="100"/>

            <Node name="Cylinder-Visu">
                <OglModel name="Visual" color="blue" />
                <IdentityMapping input="@../../Volume" output="@Visual" />
            </Node>
        </Node>
    </Node>

    <Node name="Cube">
        <MeshObjLoader name="loader" filename="mesh/cube_HD.obj" />
        <MeshTopology src="@loader" />
        <MechanicalObject name="Floor" src="@loader" />
        <TriangleCollisionModel name="FloorTC" simulated="0" moving="0" />
        <LineCollisionModel name="FloorLC" simulated="0" moving="0" />
        <PointCollisionModel name="FloorPC" simulated="0" moving="0" />
        <Node name="Cube-Visu">
            <OglModel name="Visual" color="red" />
            <IdentityMapping input="@../Floor" output="@Visual" />
        </Node>
    </Node>
</Node>
