<?xml version="1.0" ?>
<Node dt="0.005" gravity="0 -10 0" bbox="-5 -5 -5 5 5 5">
    <RequiredPlugin name="Sofa.Component.AnimationLoop"/> <!-- Needed to use components [FreeMotionAnimationLoop] -->
    <RequiredPlugin name="Sofa.Component.Collision.Detection.Algorithm"/> <!-- Needed to use components [BVHNarrowPhase, BruteForceBroadPhase, DefaultPipeline] -->
    <RequiredPlugin name="Sofa.Component.Collision.Detection.Intersection"/> <!-- Needed to use components [MinProximityIntersection] -->
    <RequiredPlugin name="Sofa.Component.Collision.Geometry"/> <!-- Needed to use components [SphereCollisionModel, TriangleCollisionModel] -->
    <RequiredPlugin name="Sofa.Component.Collision.Response.Contact"/> <!-- Needed to use components [DefaultContactManager] -->
    <RequiredPlugin name="Sofa.Component.Constraint.Lagrangian.Correction"/> <!-- Needed to use components [UncoupledConstraintCorrection] -->
    <RequiredPlugin name="Sofa.Component.Constraint.Lagrangian.Solver"/> <!-- Needed to use components [GenericConstraintSolver] -->
    <RequiredPlugin name="Sofa.Component.Constraint.Projective"/> <!-- Needed to use components [FixedConstraint] -->
    <RequiredPlugin name="Sofa.Component.Engine.Select"/> <!-- Needed to use components [BoxROI] -->
    <RequiredPlugin name="Sofa.Component.IO.Mesh"/> <!-- Needed to use components [MeshGmshLoader] -->
    <RequiredPlugin name="Sofa.Component.LinearSolver.Iterative"/> <!-- Needed to use components [CGLinearSolver] -->
    <RequiredPlugin name="Sofa.Component.Mapping.Linear"/> <!-- Needed to use components [IdentityMapping] -->
    <RequiredPlugin name="Sofa.Component.Mass"/> <!-- Needed to use components [UniformMass] -->
    <RequiredPlugin name="Sofa.Component.ODESolver.Backward"/> <!-- Needed to use components [EulerImplicitSolver] -->
    <RequiredPlugin name="Sofa.Component.SceneUtility"/> <!-- Needed to use components [InfoComponent] -->
    <RequiredPlugin name="Sofa.Component.SolidMechanics.FEM.Elastic"/> <!-- Needed to use components [TriangularFEMForceField] -->
    <RequiredPlugin name="Sofa.Component.SolidMechanics.Spring"/> <!-- Needed to use components [TriangularBendingSprings] -->
    <RequiredPlugin name="Sofa.Component.StateContainer"/> <!-- Needed to use components [MechanicalObject] -->
    <RequiredPlugin name="Sofa.Component.Topology.Container.Dynamic"/> <!-- Needed to use components [TriangleSetGeometryAlgorithms, TriangleSetTopologyContainer, TriangleSetTopologyModifier] -->
    <RequiredPlugin name="Sofa.Component.Topology.Container.Grid"/> <!-- Needed to use components [RegularGridTopology] -->
    <RequiredPlugin name="Sofa.Component.Visual"/> <!-- Needed to use components [VisualStyle] -->
    <RequiredPlugin name="Sofa.GL.Component.Rendering3D"/> <!-- Needed to use components [OglModel] -->
    <RequiredPlugin name="SPHFluid"/>


    <VisualStyle displayFlags="hideBehaviorModels hideForceFields" />
    <DefaultVisualManagerLoop />
    <FreeMotionAnimationLoop />
	<UnbuiltGaussSeidelConstraintSolver tolerance="1e-4" maxIt="200"   printLog="0"/>
	<CollisionPipeline verbose="0" depth="10" draw="0" />
    <BruteForceBroadPhase/>
    <BVHNarrowPhase/>
	<MinProximityIntersection name="Proximity" alarmDistance="0.8" contactDistance="0.4" />
    <CollisionResponse name="Response" response="PenalityContactForceField" />
    <CollisionDetectionDisplay name="CollisionDetectionDisplay"/>

    <EulerImplicitSolver name="cg_odesolver" rayleighStiffness="0.1" rayleighMass="0.1" />
    <CGLinearSolver iterations="25" name="linear solver" tolerance="1.0e-9" threshold="1.0e-9" />


    <Node name="FGrid">
        <RegularGridTopology name="grid" nx="5" ny="20" nz="5" xmin="-1.5" xmax="0" ymin="2" ymax="10" zmin="-1.5" zmax="0"/>
        <MechanicalObject name="gridDofs" showObject="1" />
    </Node>

    <Node name="Fluid">
        <MechanicalObject name="MModel" showObject="0" position="@../FGrid/gridDofs.position"/>

        <UniformMass name="M1" vertexMass="0.5" />
        <SpatialGridContainer cellWidth="0.75" />
        <SPHFluidForceField radius="1.0" density="15" kernelType="1" viscosityType="2" viscosity="10" pressure="1000" surfaceTension="-1000" printLog="0" />

        <SphereCollisionModel radius="0.1"/>
        <UncoupledConstraintCorrection defaultCompliance="0.001"/>
    </Node>


    <Node name="Tissue">
        <MeshGmshLoader name="meshLoader" filename="./mesh/square3.msh" translation="-5 0 -5" rotation="90 0 0" scale="10" createSubelements="true" />

        <TriangleSetTopologyContainer  name="Container" src="@meshLoader" />
		<TriangleSetTopologyModifier   name="Modifier" />
		<TriangleSetGeometryAlgorithms name="GeomAlgo"   template="Vec3d" />

        <MechanicalObject name="Mo"/>
        <UniformMass totalMass="1" />

        <BoxROI name="ROI1" box="-10 -1 -6 10 1 -4.9" drawBoxes="0"/>
        <FixedProjectiveConstraint indices="@ROI1.indices" />

        <BoxROI name="ROI2" box="-10 -1 4.9 10 1 5.1" drawBoxes="0"/>
        <FixedProjectiveConstraint indices="@ROI2.indices" />

        <TriangularFEMForceField name="FEM" youngModulus="60" poissonRatio="0.3" method="large" />
        <TriangularBendingSprings name="FEM-Bend" stiffness="300" damping="1.0" topology="@Container"/>
        <TriangleCollisionModel />
        <UncoupledConstraintCorrection defaultCompliance="0.1"/>
        <Node name="VisualNode">
            <OglModel name="Visual" color="red" />
            <IdentityMapping input="@.." output="@Visual" />
        </Node>
    </Node>
</Node>
