<?xml version="1.0" ?>
<Node name="lroot" gravity="0 -9.8 0" dt="0.02">
    <VisualStyle displayFlags="showVisual hideBehaviorModels " /> <!--showBehaviorModels showCollisionModels-->

    <DefaultPipeline verbose="0" />
    <BruteForceDetection name="N2" />
    <DefaultContactManager response="default" />
    <MinProximityIntersection name="Proximity" alarmDistance="0.5" contactDistance="0.2" />
    <DefaultCollisionGroupManager />


    <Node name="liver">
        <EulerImplicitSolver name="cg_odesolver" printLog="false"  rayleighStiffness="0.1" rayleighMass="0.1" />
    <CGLinearSolver iterations="25" name="linear solver" tolerance="1.0e-9" threshold="1.0e-9" />

        <MeshGmshLoader name="loader" filename="./mesh/liver2.msh" />
        <MechanicalObject src="@loader" name="Volume" rotation="140 180 0"/>

		<TetrahedronSetTopologyContainer  name="Container" position="@Volume.position" src="@loader" tags=" "/>
		<TetrahedronSetTopologyModifier   name="Modifier" />
		<TetrahedronSetTopologyAlgorithms name="TopoAlgo"  template="Vec3d" />
		<TetrahedronSetGeometryAlgorithms name="GeomAlgo"  template="Vec3d" />

        <DiagonalMass massDensity="1.0" />
        <BoxROI template="Vec3d" box="4 -4 -3 10 2 3" drawBoxes="1" position="@Volume.rest_position" name="FixedROI"/>
        <FixedConstraint indices="@FixedROI.indices" />
        <!--<TetrahedralCorotationalFEMForceField name="FEM" youngModulus="1300" poissonRatio="0.3" method="large" />		-->
		<TetrahedronFEMForceField name="FEM" youngModulus="1300" poissonRatio="0.3" computeGlobalMatrix="false" method="large" />

        <!--
        <Node name="liver_visu">
            <MeshObjLoader name="meshLoader_9" filename="./mesh/liver-smooth.obj" handleSeams="1"/>
            <OglModel name="Visual" src="@meshLoader_9"  />
            <BarycentricMapping input="@.." output="@Visual" printLog="1"/>
        </Node>
        -->
        <Node name="liver_collision">
            <MeshObjLoader name="loader" filename="./mesh/liver-smooth.obj" />
            <TriangleSetTopologyContainer src="@loader" />
            <MechanicalObject src="@loader" name="CollisModel" />
            <TriangleCollisionModel  selfCollision="0"/>


            <BarycentricMapping input="@../Volume" output="@CollisModel" printLog="1"
            mapForces="1" mapConstraints="1" mapMasses="1" mapMatrices="1"/>
        </Node>

    </Node>

    <Node name="test">
        <MechanicalObject name="tool" scale3d="1 1 1" position="0 50 0"/>
       <StiffSpringForceField name="force" object1="@../liver/liver_collision/CollisModel" object2="@tool" stiffness="10000"
       indices1="0" indices2="0" printLog="1"/>
   <!--      <StiffSpringForceField name="force" object1="@../liver/dofs" object2="@tool" indices1="0" indices2="0"/>-->
        <Sphere radius="0.5"  selfCollision="0" group="1"/>
        <FixedConstraint indices="0" />
    </Node>


</Node>
